*Heading
** Job name: jSpirale Model name: Model-1
** Generated by: Abaqus/CAE 6.14-1
*Preprint, echo=NO, model=NO, history=NO, contact=NO
**
** PARTS
**
*Part, name=spirale
*Node
      1,         -2.5,          7.5,          -5.
      2,         -2.5,          7.5,           0.
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*Element, type=C3D8R
  1,    3,    2,    1,   96,  410,  406,  407, 1147
  2,  410,  406,  407, 1147,  411,  405,  408, 1148
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*Nset, nset=Set-1, generate
    1,  1926,     1
*Elset, elset=Set-1, generate
   1,  852,    1
** Section: Section-1
*Solid Section, elset=Set-1, material=Material-1
,
*End Part
**
**
** ASSEMBLY
**
*Assembly, name=Assembly
**
*Instance, name=spirale-1, part=spirale
*End Instance
**
*Nset, nset=Set-1, instance=spirale-1
 2,
*Nset, nset=Set-2, instance=spirale-1
   54,   55,   57,   58,   95,  699,  700, 1107, 1146
*Elset, elset=Set-2, instance=spirale-1
 213, 214, 639, 852
*End Assembly
**
** MATERIALS
**
*Material, name=Material-1
*Density
 5e-09,
*Elastic
100.,0.
** ----------------------------------------------------------------
**
** STEP: Step-Dead
**
*Step, name=Step-Dead, nlgeom=YES
*Static
0.1, 1., 1e-05, 0.1
**
** BOUNDARY CONDITIONS
**
** Name: BC-1 Type: Displacement/Rotation
*Boundary
Set-1, 1, 1
Set-1, 2, 2
Set-1, 3, 3
** Name: disp Type: Displacement/Rotation
*Boundary
Set-2, 1, 1
Set-2, 2, 2
Set-2, 3, 3, 300.
**
** LOADS
**
** Name: dead   Type: Gravity
*Dload
, GRAV, 9810., 0., 0., -1.
**
** OUTPUT REQUESTS
**
*Restart, write, frequency=0
**
** FIELD OUTPUT: F-Output-1
**
*Output, field, variable=PRESELECT
**
** HISTORY OUTPUT: H-Output-1
**
*Output, history, variable=PRESELECT
*End Step
